*Heading
** Job name: CUBE_T_EL_SIZE_0_05 Model name: Model-1
** Generated by: Abaqus/CAE 6.14-1
*Preprint, echo=NO, model=NO, history=NO, contact=NO
**
** PARTS
**
*Part, name=cube
*Node
      1,           1.,           1.,           1.
      2,           1.,  0.949999988,           1.
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*Element, type=C3D8
   1,  442,  443,  464,  463,    1,    2,   23,   22
   2,  443,  444,  465,  464,    2,    3,   24,   23
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*Nset, nset=_PickedSet4, internal, generate
    1,  9261,     1
*Elset, elset=_PickedSet4, internal, generate
    1,  8000,     1
*Orientation, name=Ori-1
1., 0., 0., 0., 1., 0.
3, 0.
** Section: EL_SECT
*Solid Section, elset=_PickedSet4, orientation=Ori-1, material=UMAT_MAT
,
*End Part
**
**
** ASSEMBLY
**
*Assembly, name=Assembly
**
*Instance, name=cube-1, part=cube
*End Instance
**
*Nset, nset=_PickedSet4, internal, instance=cube-1, generate
    1,  9241,    21
*Elset, elset=_PickedSet4, internal, instance=cube-1, generate
    1,  7981,    20
*Nset, nset=_PickedSet5, internal, instance=cube-1, generate
   21,  9261,    21
*Elset, elset=_PickedSet5, internal, instance=cube-1, generate
   20,  8000,    20
*End Assembly
**
** MATERIALS
**
** material properties required for goldenSectionROG.for
*Material, name=UMAT_MAT
*Depvar
     23,
*User Material, constants=24
 1.397e+06, 12900.,  6900.,  6900.,   0.23,   0.23, 1516.8, 1592.7
231000.,    0.2,    1.1,   0.35,    0.3,   0.25,    0.3,  44.54
  106.8,   253.,   91.6,   79.9,   0.22,   0.76,   0.46,   0.05
** ----------------------------------------------------------------
**
** STEP: Step-1
**
*Step, name=Step-1, nlgeom=NO, inc=100000000
*Static, stabilize=0.005, allsdtol=0, continue=NO
0.01, 1., 1e-12, 0.01
**
** BOUNDARY CONDITIONS
**
** Name: DISPL_Y_TENS Type: Displacement/Rotation
*Boundary
_PickedSet4, 2, 2, 0.02
** Name: ENCASTRE Type: Symmetry/Antisymmetry/Encastre
*Boundary
_PickedSet5, ENCASTRE
**
** CONTROLS
**
*Controls, reset
*Controls, parameters=time incrementation
50, 50, , 50, , , , , , ,
**
** OUTPUT REQUESTS
**
*Restart, write, frequency=0
**
** FIELD OUTPUT: F-Output-1
**
*Output, field
*Node Output
RF, U
*Element Output, directions=YES
E, S, SDV, UVARM
**
** HISTORY OUTPUT: H-Output-1
**
*Output, history, variable=PRESELECT
*End Step
